<?xml version="1.0"?>
<?xml-stylesheet type="text/xsl" href="http://jsbsim.sourceforge.net/JSBSim.xsl"?>
<fdm_config name="do328jet" version="2.0" release="ALPHA"
   xmlns:xsi="http://www.w3.org/2001/XMLSchema-instance"
   xsi:noNamespaceSchemaLocation="http://jsbsim.sourceforge.net/JSBSim.xsd">

 <fileheader>
  <author> IceGuye, Bo Lan, and the Bot -- Aeromatic </author>
  <filecreationdate>2015-05-07</filecreationdate>
  <version>$Revision: 1.15 $</version>
  <description> Models a Do 328 Jet. </description>
 </fileheader>

<!--
  File:     do328jet.xml
  Inputs:
    name:          do328jet
    type:          two-engine transonic transport
    max weight:    34530.3 lb
    wing span:     68.83538 ft
    length:        69.95092 ft
    wing area:     430.59844 sq-ft
    gear type:     tricycle
    retractable?:  yes
    # engines:     2
    engine type:   turbine
    engine layout: wings
    yaw damper?    yes
  Outputs:
    wing loading:  80.19 lb/sq-ft
    payload:       4194.3 lbs
    CL-alpha:      4.4 per radian
    CL-0:          0.2
    CL-max:        1.2
    CD-0:          0.02
    K:             0.043

-->

 <metrics>
   <wingarea  unit="FT2">  430.60 </wingarea>
   <wingspan  unit="FT" >   68.84 </wingspan>
   <wing_incidence>          2.00 </wing_incidence>
   <chord     unit="FT" >    6.26 </chord>
   <htailarea unit="FT2">   105.7585 </htailarea>
   <htailarm  unit="FT" >   37.8521 </htailarm>
   <vtailarea unit="FT2">  174.7093 </vtailarea>
   <vtailarm  unit="FT" >   30.1346 </vtailarm>
   <location name="AERORP" unit="IN">
     <x> 391.48 </x>
     <y>   0.00 </y>
     <z>   0.00 </z>
   </location>
   <location name="EYEPOINT" unit="IN">
     <x>  58.76 </x>
     <y> -30.00 </y>
     <z>  70.00 </z>
   </location>
   <location name="VRP" unit="IN">
     <x>0</x>
     <y>0</y>
     <z>0</z>
   </location>
 </metrics>

 <mass_balance>
   <ixx unit="SLUG*FT2">     47758 </ixx>
   <iyy unit="SLUG*FT2">    113946 </iyy>
   <izz unit="SLUG*FT2">    164321 </izz>
   <emptywt unit="LBS" >     20771 </emptywt>
   <location name="CG" unit="IN">
     <x> 391.48 </x>
     <y>   0.00 </y>
     <z> -20.99 </z>
   </location>
   <pointmass name="Payload">
    <description> 4194 LBS + full (9565 LBS) fuel should bring model up to entered max weight</description>
    <weight unit="LBS">   2097.2 </weight>
    <location name="POINTMASS" unit="IN">
      <x> 391.48 </x>
      <y>   0.00 </y>
      <z> -20.99 </z>
    </location>
  </pointmass>
 </mass_balance>

 <ground_reactions>

  <contact type="BOGEY" name="NOSE">
   <location unit="IN">
     <x> 109.12 </x>
     <y>   0.00 </y>
     <z> -100.73 </z>
   </location>
   <static_friction>  0.80 </static_friction>
   <dynamic_friction> 0.50 </dynamic_friction>
   <rolling_friction> 0.02 </rolling_friction>
   <spring_coeff unit="LBS/FT">      10359.09 </spring_coeff>
   <damping_coeff unit="LBS/FT/SEC"> 17265.15 </damping_coeff>
   <max_steer unit="DEG"> 5.00 </max_steer>
   <brake_group>NONE</brake_group>
   <retractable>1</retractable>
  </contact>

  <contact type="BOGEY" name="LEFT_MAIN">
   <location unit="IN">
     <x> 407.13 </x>
     <y> -74.34 </y>
     <z> -100.73 </z>
   </location>
   <static_friction>  0.80 </static_friction>
   <dynamic_friction> 0.50 </dynamic_friction>
   <rolling_friction> 0.02 </rolling_friction>
   <spring_coeff unit="LBS/FT">      34530.30 </spring_coeff>
   <damping_coeff unit="LBS/FT/SEC"> 17265.15 </damping_coeff>
   <max_steer unit="DEG">0</max_steer>
   <brake_group>LEFT</brake_group>
   <retractable>1</retractable>
  </contact>

  <contact type="BOGEY" name="RIGHT_MAIN">
   <location unit="IN">
     <x> 407.13 </x>
     <y>  74.34 </y>
     <z> -100.73 </z>
   </location>
   <static_friction>  0.80 </static_friction>
   <dynamic_friction> 0.50 </dynamic_friction>
   <rolling_friction> 0.02 </rolling_friction>
   <spring_coeff unit="LBS/FT">      34530.30 </spring_coeff>
   <damping_coeff unit="LBS/FT/SEC"> 17265.15 </damping_coeff>
   <max_steer unit="DEG">0</max_steer>
   <brake_group>RIGHT</brake_group>
   <retractable>1</retractable>
  </contact>

  <contact type="STRUCTURE" name="LEFT_WING">
    <location unit="IN">
     <x> 391.48 </x>
     <y> -34.42 </y>
     <z> -20.99 </z>
    </location>
    <static_friction>  1.00 </static_friction>
    <dynamic_friction> 1.00 </dynamic_friction>
    <spring_coeff unit="LBS/FT">      34530.30 </spring_coeff>
    <damping_coeff unit="LBS/FT/SEC"> 34530.30 </damping_coeff>
  </contact>

  <contact type="STRUCTURE" name="RIGHT_WING">
    <location unit="IN">
     <x> 391.48 </x>
     <y>  34.42 </y>
     <z> -20.99 </z>
    </location>
    <static_friction>  1.00 </static_friction>
    <dynamic_friction> 1.00 </dynamic_friction>
    <spring_coeff unit="LBS/FT">      34530.30 </spring_coeff>
    <damping_coeff unit="LBS/FT/SEC"> 34530.30 </damping_coeff>
  </contact>

 </ground_reactions>

 <propulsion>

   <engine file="PW306BL">
    <location unit="IN">
      <x> 303.60 </x>
      <y> -145.20 </y>
      <z> 0.00 </z>
    </location>
    <orient unit="DEG">
      <pitch> 0.00 </pitch>
      <roll>  0.00 </roll>
      <yaw>   0.00 </yaw>
    </orient>
    <feed>0</feed>
    <thruster file="direct">
     <location unit="IN">
       <x> 387.60 </x>
       <y> -145.20 </y>
       <z> 0.00 </z>
     </location>
     <orient unit="DEG">
       <pitch> 0.00 </pitch>
       <roll>  0.00 </roll>
       <yaw>   0.00 </yaw>
     </orient>
    </thruster>
  </engine>

   <engine file="PW306BL">
    <location unit="IN">
      <x> 303.60 </x>
      <y> 145.20 </y>
      <z> 0.00 </z>
    </location>
    <orient unit="DEG">
      <pitch> 0.00 </pitch>
      <roll>  0.00 </roll>
      <yaw>   0.00 </yaw>
    </orient>
    <feed>1</feed>
    <thruster file="direct">
     <location unit="IN">
       <x> 387.60 </x>
       <y> 145.20 </y>
       <z> 0.00 </z>
     </location>
     <orient unit="DEG">
       <pitch> 0.00 </pitch>
       <roll>  0.00 </roll>
       <yaw>   0.00 </yaw>
     </orient>
    </thruster>
  </engine>

  <tank type="FUEL" number="0">
     <location unit="IN">
       <x> 391.48 </x>
       <y>   0.00 </y>
       <z> 0.00 </z>
     </location>
     <capacity unit="LBS"> 3188.30 </capacity>
     <contents unit="LBS"> 1594.15 </contents>
  </tank>

  <tank type="FUEL" number="1">
     <location unit="IN">
       <x> 391.48 </x>
       <y>   0.00 </y>
       <z> 0.00 </z>
     </location>
     <capacity unit="LBS"> 3188.30 </capacity>
     <contents unit="LBS"> 1594.15 </contents>
  </tank>

  <tank type="FUEL" number="2">
     <location unit="IN">
       <x> 391.48 </x>
       <y>   0.00 </y>
       <z> 0.00 </z>
     </location>
     <capacity unit="LBS"> 3188.30 </capacity>
     <contents unit="LBS"> 1594.15 </contents>
  </tank>

 </propulsion>

 <flight_control name="FCS: Do 328 Jet">

  <channel name="Pitch">

   <summer name="Pitch Trim Sum">
      <input>fcs/elevator-cmd-norm</input>
      <input>fcs/pitch-trim-cmd-norm</input>
      <clipto>
        <min> -1 </min>
        <max>  1 </max>
      </clipto>
   </summer>

   <aerosurface_scale name="Elevator Control">
      <input>fcs/pitch-trim-sum</input>
      <range>
        <min> -0.436332313 </min>
        <max>  0.523598776 </max>
      </range>
      <output>fcs/elevator-pos-rad</output>
   </aerosurface_scale>

   <aerosurface_scale name="elevator normalization">
      <input>fcs/elevator-pos-rad</input>
      <domain>
        <min> -0.436332313 </min>
        <max>  0.523598776 </max>
      </domain>
      <range>
        <min> -1 </min>
        <max>  1 </max>
      </range>
      <output>fcs/elevator-pos-norm</output>
   </aerosurface_scale>

  </channel>

  <channel name="Roll">

   <summer name="Roll Trim Sum">
      <input>fcs/aileron-cmd-norm</input>
      <input>fcs/roll-trim-cmd-norm</input>
      <clipto>
        <min> -1 </min>
        <max>  1 </max>
      </clipto>
   </summer>

   <aerosurface_scale name="Left Aileron Control">
      <input>fcs/roll-trim-sum</input>
      <range>
        <min> -0.436332313 </min>
        <max>  0.488692191 </max>
      </range>
      <output>fcs/left-aileron-pos-rad</output>
   </aerosurface_scale>

   <aerosurface_scale name="Right Aileron Control">
      <input>fcs/roll-trim-sum</input>
      <range>
        <min> -0.436332313 </min>
        <max>  0.488692191 </max>
      </range>
      <output>fcs/right-aileron-pos-rad</output>
   </aerosurface_scale>

   <aerosurface_scale name="left aileron normalization">
      <input>fcs/left-aileron-pos-rad</input>
      <domain>
        <min> -0.436332313 </min>
        <max>  0.488692191 </max>
      </domain>
      <range>
        <min> -1 </min>
        <max>  1 </max>
      </range>
      <output>fcs/left-aileron-pos-norm</output>
   </aerosurface_scale>

   <aerosurface_scale name="right aileron normalization">
      <input>fcs/right-aileron-pos-rad</input>
      <domain>
        <min> -0.436332313 </min>
        <max>  0.488692191 </max>
      </domain>
      <range>
        <min> -1 </min>
        <max>  1 </max>
      </range>
      <output>fcs/right-aileron-pos-norm</output>
   </aerosurface_scale>

  </channel>

  <property value="1">fcs/yaw-damper-enable</property>
  <channel name="Yaw">

   <summer name="Rudder Command Sum">
      <input>fcs/rudder-cmd-norm</input>
      <input>fcs/yaw-trim-cmd-norm</input>
      <clipto>
        <min> -1 </min>
        <max>  1 </max>
      </clipto>
   </summer>

   <scheduled_gain name="Yaw Damper Rate">
      <input>velocities/r-aero-rad_sec</input>
      <table>
        <independentVar lookup="row">velocities/ve-kts</independentVar>
         <tableData>
            30     0.00
            60     2.00
         </tableData>
      </table>
      <gain>fcs/yaw-damper-enable</gain>
   </scheduled_gain>

   <summer name="Rudder Sum">
      <input>fcs/rudder-command-sum</input>
      <input>fcs/yaw-damper-rate</input>
      <clipto>
        <min> -1.1 </min>
        <max>  1.1 </max>
      </clipto>
   </summer>

   <aerosurface_scale name="Rudder Control">
      <input>fcs/rudder-sum</input>
      <domain>
        <min> -1.1 </min>
        <max>  1.1 </max>
      </domain>
      <range>
        <min> -0.418879021 </min>
        <max>  0.418879021 </max>
      </range>
      <output>fcs/rudder-pos-rad</output>
   </aerosurface_scale>

   <aerosurface_scale name="rudder normalization">
      <input>fcs/rudder-pos-rad</input>
      <domain>
        <min> -0.418879021 </min>
        <max>  0.418879021 </max>
      </domain>
      <range>
        <min> -1 </min>
        <max>  1 </max>
      </range>
      <output>fcs/rudder-pos-norm</output>
   </aerosurface_scale>

  </channel>

  <channel name="Flaps">
   <kinematic name="Flaps Control">
     <input>fcs/flap-cmd-norm</input>
     <traverse>
       <setting>
          <position>  0 </position>
          <time>      0 </time>
       </setting>
       <setting>
          <position> 12 </position>
          <time>      4 </time>
       </setting>
       <setting>
          <position> 20 </position>
          <time>      3 </time>
       </setting>
       <setting>
          <position> 32 </position>
          <time>      4 </time>
       </setting>     </traverse>
     <output>fcs/flap-pos-deg</output>
   </kinematic>

   <aerosurface_scale name="flap normalization">
      <input>fcs/flap-pos-deg</input>
      <domain>
        <min>  0 </min>
        <max> 32 </max>
      </domain>
      <range>
        <min> 0 </min>
        <max> 1 </max>
      </range>
      <output>fcs/flap-pos-norm</output>
   </aerosurface_scale>

  </channel>

  <channel name="Landing Gear">
   <kinematic name="Gear Control">
     <input>gear/gear-cmd-norm</input>
     <traverse>
       <setting>
          <position> 0 </position>
          <time>     0 </time>
       </setting>
       <setting>
          <position> 1 </position>
          <time>     5 </time>
       </setting>
     </traverse>
     <output>gear/gear-pos-norm</output>
   </kinematic>

  </channel>

  <channel name="Speedbrake">
   <kinematic name="Speedbrake Control">
     <input>fcs/speedbrake-cmd-norm</input>
     <traverse>
       <setting>
          <position> 0 </position>
          <time>     0 </time>
       </setting>
       <setting>
          <position> 1 </position>
          <time>     1 </time>
       </setting>
     </traverse>
     <output>fcs/speedbrake-pos-norm</output>
   </kinematic>

  </channel>

 </flight_control>

 <aerodynamics>

   <alphalimits unit="DEG">
     <min>  -16.00    </min>
     <max>   24.00    </max>
   </alphalimits>

   <function name="aero/function/ground-effect-factor-lift">
     <description>Change in lift due to ground effect factor</description>
     <product>
       <table>
         <independentVar lookup="row">aero/h_b-mac-ft</independentVar>
         <tableData>
           0.0  1.203
           0.1  1.127
           0.15 1.090
           0.2  1.073
           0.3  1.046
           0.4  1.055
           0.5  1.019
           0.6  1.013
           0.7  1.008
           0.8  1.006
           0.9  1.003
           1.0  1.002
           1.1  1.0
         </tableData>
       </table>
     </product>
   </function>

   <function name="aero/function/ground-effect-factor-drag">
     <description>Change in drag due to ground effect</description>
     <product>
       <table>
         <independentVar lookup="row">aero/h_b-mac-ft</independentVar>
         <tableData>
           0.0  0.480
           0.1  0.515
           0.15 0.629
           0.2  0.709
           0.3  0.815
           0.4  0.882
           0.5  0.928
           0.6  0.962
           0.7  0.988
           0.8  1.0
           0.9  1.0
           1.0  1.0
           1.1  1.0
         </tableData>
       </table>
     </product>
   </function>


  <axis name="LIFT">

         <function name="aero/coefficient/CLwbh">
            <description>
               Lift due to alpha
               Increase in CL decreases Period and damping,Dutch Roll damping
               CL is low for landing
            </description>
            <product>
               <property>aero/function/ground-effect-factor-lift</property>
               <property>aero/qbar-psf</property>
               <property>metrics/Sw-sqft</property>
               <table>
                  <independentVar lookup="row">aero/alpha-deg</independentVar>
                  <tableData>
                       -16.00        -1.101
                       -8.000        -.2734
                       -6.000        -.4470E-01
                       -4.000         .1873
                       -2.000         .4173
                         .000         .6439
                        2.000         .8387
                        4.000         .9953
                        8.000         1.197
                        9.000         1.241
                        10.00         1.278
                        12.00         1.375
                        14.00         1.490
                        16.00         1.608
                        18.00         1.739
                        19.00         1.805
                        20.00         1.868
                        21.00         1.931
                        22.00         1.989
                        24.00         2.125
                  </tableData>
               </table>
            </product>
         </function>

         <function name="aero/coefficient/CLq">
            <description>
               Basic Lift Coefficient due to pitch rate(per degree)
            </description>
            <product>
               <property>velocities/q-aero-rad_sec</property>
               <value>57.29577951</value>
               <property>aero/qbar-psf</property>
               <property>metrics/Sw-sqft</property>
               <property>aero/ci2vel</property>
               <table>
                  <independentVar lookup="row">aero/alpha-deg</independentVar>
                  <tableData>
                       -16.00         .8904E-01
                       -8.000         .8904E-01
                       -6.000         .8904E-01
                       -4.000         .8904E-01
                       -2.000         .8904E-01
                         .000         .8904E-01
                        2.000         .8904E-01
                        4.000         .8904E-01
                        8.000         .8904E-01
                        9.000         .8904E-01
                        10.00         .8904E-01
                        12.00         .8904E-01
                        14.00         .8904E-01
                        16.00         .8904E-01
                        18.00         .8904E-01
                        19.00         .8904E-01
                        20.00         .8904E-01
                        21.00         .8904E-01
                        22.00         .8904E-01
                        24.00         .8904E-01
                  </tableData>
               </table>
            </product>
         </function>

         <function name="aero/coefficient/CLad">
            <description>
               Basic Lift Coefficient due to AOA rate(per degree)
               Important contributor to Short-Period damping
               For low Cla, aircraft must land at high alpha
            </description>
            <product>
               <property>aero/alphadot-deg_sec</property>
               <property>aero/qbar-psf</property>
               <property>metrics/Sw-sqft</property>
               <property>aero/ci2vel</property>
               <table>
                  <independentVar lookup="row">aero/alpha-deg</independentVar>
                  <tableData>
                       -16.00         .1065E-01
                       -8.000         .1303E-01
                       -6.000         .1389E-01
                       -4.000         .1452E-01
                       -2.000         .1492E-01
                         .000         .1459E-01
                        2.000         .1337E-01
                        4.000         .1127E-01
                        8.000         .7276E-02
                        9.000         .7158E-02
                        10.00         .7711E-02
                        12.00         .9060E-02
                        14.00         .1095E-01
                        16.00         .1141E-01
                        18.00         .7011E-02
                        19.00         .5269E-02
                        20.00         .5321E-02
                        21.00         .4784E-02
                        22.00         .3604E-02
                        24.00         .2435E-02
                  </tableData>
               </table>
            </product>
         </function>

         <function name="aero/coefficient/CLdF1L">
            <description>
               Lift Coefficient due to Left Plain Flaps Deflection
               Positive surface deflection is trailing edge down
               Ultimately, we will feed this left flap pos
            </description>
            <product>
               <property>aero/qbar-psf</property>
               <property>metrics/Sw-sqft</property>
               <table>
                  <independentVar lookup="row">fcs/flap-pos-deg</independentVar>
                  <tableData>
                       -30.00        -.1331E-01
                       -20.00        -.1166E-01
                       -15.00        -.1045E-01
                       -5.000        -.3569E-02
                         .000          .000
                        5.000         .3569E-02
                        15.00         .1045E-01
                        20.00         .1166E-01
                        30.00         .1331E-01
                  </tableData>
               </table>
            </product>
         </function>

         <function name="aero/coefficient/CLdF1R">
            <description>
               Lift Coefficient due to Right Plain Flaps Deflection
               Positive surface deflection is trailing edge down
               Ultimately, we will feed this right flap pos
            </description>
            <product>
               <property>aero/qbar-psf</property>
               <property>metrics/Sw-sqft</property>
               <table>
                  <independentVar lookup="row">fcs/flap-pos-deg</independentVar>
                  <tableData>
                       -30.00        -.1331E-01
                       -20.00        -.1166E-01
                       -15.00        -.1045E-01
                       -5.000        -.3569E-02
                         .000          .000
                        5.000         .3569E-02
                        15.00         .1045E-01
                        20.00         .1166E-01
                        30.00         .1331E-01
                  </tableData>
               </table>
            </product>
         </function>
         <function name="aero/coefficient/CLdF11L">
            <description>
               Lift Coefficient due to Left Plain Flaps Deflection
               Positive surface deflection is trailing edge down
               Ultimately, we will feed this left flap pos
            </description>
            <product>
               <property>aero/qbar-psf</property>
               <property>metrics/Sw-sqft</property>
               <table>
                  <independentVar lookup="row">fcs/flap-pos-deg</independentVar>
                  <tableData>
                        30.00        -.1325E-01
                        20.00        -.1161E-01
                        15.00        -.1041E-01
                        5.000        -.3553E-02
                         .000          .000
                       -5.000         .3553E-02
                       -15.00         .1041E-01
                       -20.00         .1161E-01
                       -30.00         .1325E-01
                  </tableData>
               </table>
            </product>
         </function>

         <function name="aero/coefficient/CLdF11R">
            <description>
               Lift Coefficient due to Right Plain Flaps Deflection
               Positive surface deflection is trailing edge down
               Ultimately, we will feed this right flap pos
            </description>
            <product>
               <property>aero/qbar-psf</property>
               <property>metrics/Sw-sqft</property>
               <table>
                  <independentVar lookup="row">fcs/flap-pos-deg</independentVar>
                  <tableData>
                        30.00        -.1325E-01
                        20.00        -.1161E-01
                        15.00        -.1041E-01
                        5.000        -.3553E-02
                         .000          .000
                       -5.000         .3553E-02
                       -15.00         .1041E-01
                       -20.00         .1161E-01
                       -30.00         .1325E-01
                  </tableData>
               </table>
            </product>
         </function>

         <function name="aero/coefficient/CLdF12L">
            <description>
               Lift Coefficient due to Left Plain Flaps Deflection
               Positive surface deflection is trailing edge down
               Ultimately, we will feed this left flap pos
            </description>
            <product>
               <property>aero/qbar-psf</property>
               <property>metrics/Sw-sqft</property>
               <table>
                  <independentVar lookup="row">fcs/flap-pos-deg</independentVar>
                  <tableData>
                        30.00        -.1136E-01
                        20.00        -.9951E-02
                        15.00        -.8920E-02
                        5.000        -.3045E-02
                         .000          .000
                       -5.000         .3045E-02
                       -15.00         .8920E-02
                       -20.00         .9951E-02
                       -30.00         .1136E-01
                  </tableData>
               </table>
            </product>
         </function>

         <function name="aero/coefficient/CLdF12R">
            <description>
               Lift Coefficient due to Right Plain Flaps Deflection
               Positive surface deflection is trailing edge down
               Ultimately, we will feed this right flap pos
            </description>
            <product>
               <property>aero/qbar-psf</property>
               <property>metrics/Sw-sqft</property>
               <table>
                  <independentVar lookup="row">fcs/flap-pos-deg</independentVar>
                  <tableData>
                        30.00        -.1136E-01
                        20.00        -.9951E-02
                        15.00        -.8920E-02
                        5.000        -.3045E-02
                         .000          .000
                       -5.000         .3045E-02
                       -15.00         .8920E-02
                       -20.00         .9951E-02
                       -30.00         .1136E-01
                  </tableData>
               </table>
            </product>
         </function>

         <function name="aero/coefficient/CLDe">
            <description>
               Lift Coefficient due to Elevator Deflection
               Positive surface deflection is trailing edge down
            </description>
            <product>
               <property>aero/qbar-psf</property>
               <property>metrics/Sw-sqft</property>
               <table>
                  <independentVar lookup="row">fcs/elevator-pos-deg</independentVar>
                  <tableData>
                       -30.00        -.2271E-01
                       -20.00        -.1990E-01
                       -15.00        -.1784E-01
                       -5.000        -.6091E-02
                         .000         .1218E-04
                        5.000         .6091E-02
                        15.00         .1784E-01
                        20.00         .1990E-01
                        30.00         .2271E-01
                  </tableData>
               </table>
            </product>
         </function>

    <function name="aero/force/Lift_speedbrake">
       <description>Delta Lift due to speedbrake</description>
       <product>
           <property>aero/qbar-psf</property>
           <property>metrics/Sw-sqft</property>
           <property>fcs/speedbrake-pos-norm</property>
           <value>-0.1</value>
       </product>
    </function>

  </axis>

  <axis name="DRAG">


    <function name="aero/force/Drag_induced">
       <description>Induced drag</description>
         <product>
           <property>aero/qbar-psf</property>
           <property>metrics/Sw-sqft</property>
           <property>aero/cl-squared</property>
           <value>0.043</value>
         </product>
    </function>

    <function name="aero/force/Drag_mach">
       <description>Drag due to mach</description>
        <product>
          <property>aero/qbar-psf</property>
          <property>metrics/Sw-sqft</property>
          <table>
            <independentVar lookup="row">velocities/mach</independentVar>
            <tableData>
                0.00      0.000
                0.79      0.000
                1.10      0.023
                1.80      0.015
            </tableData>
          </table>
        </product>
    </function>

    <function name="aero/force/Drag_flap">
       <description>Drag due to flaps</description>
         <product>
           <property>aero/qbar-psf</property>
           <property>metrics/Sw-sqft</property>
           <property>fcs/flap-pos-deg</property>
           <value> 0.00197 </value>
         </product>
    </function>

    <function name="aero/force/Drag_gear">
       <description>Drag due to gear</description>
         <product>
           <property>aero/qbar-psf</property>
           <property>metrics/Sw-sqft</property>
           <property>gear/gear-pos-norm</property>
           <value>0.015</value>
         </product>
    </function>

    <function name="aero/force/Drag_speedbrake">
       <description>Drag due to speedbrakes</description>
         <product>
           <property>aero/qbar-psf</property>
           <property>metrics/Sw-sqft</property>
           <property>fcs/speedbrake-pos-norm</property>
           <value>0.02</value>
         </product>
    </function>

    <function name="aero/force/Drag_beta">
       <description>Drag due to sideslip</description>
       <product>
          <property>aero/qbar-psf</property>
          <property>metrics/Sw-sqft</property>
          <table>
            <independentVar lookup="row">aero/beta-rad</independentVar>
            <tableData>
              -1.57    1.230
              -0.26    0.050
               0.00    0.000
               0.26    0.050
               1.57    1.230
            </tableData>
          </table>
       </product>
    </function>

    <function name="aero/force/Drag_elevator">
       <description>Drag due to Elevator Deflection</description>
       <product>
           <property>aero/qbar-psf</property>
           <property>metrics/Sw-sqft</property>
           <abs><property>fcs/elevator-pos-norm</property></abs>
           <value>0.04</value>
       </product>
    </function>

  </axis>

  <axis name="SIDE">

    <function name="aero/force/Side_beta">
       <description>Side force due to beta</description>
       <product>
           <property>aero/qbar-psf</property>
           <property>metrics/Sw-sqft</property>
           <property>aero/beta-rad</property>
           <value>-1</value>
       </product>
    </function>

  </axis>

  <axis name="ROLL">

    <function name="aero/moment/Roll_beta">
       <description>Roll moment due to beta</description>
       <product>
           <property>aero/qbar-psf</property>
           <property>metrics/Sw-sqft</property>
           <property>metrics/bw-ft</property>
           <property>aero/beta-rad</property>
           <value>-0.1</value>
       </product>
    </function>

    <function name="aero/moment/Roll_damp">
       <description>Roll moment due to roll rate</description>
       <product>
           <property>aero/qbar-psf</property>
           <property>metrics/Sw-sqft</property>
           <property>metrics/bw-ft</property>
           <property>aero/bi2vel</property>
           <property>velocities/p-aero-rad_sec</property>
           <value>-0.4</value>
       </product>
    </function>

    <function name="aero/moment/Roll_yaw">
       <description>Roll moment due to yaw rate</description>
       <product>
           <property>aero/qbar-psf</property>
           <property>metrics/Sw-sqft</property>
           <property>metrics/bw-ft</property>
           <property>aero/bi2vel</property>
           <property>velocities/r-aero-rad_sec</property>
           <value>0.15</value>
       </product>
    </function>

    <function name="aero/moment/Roll_aileron">
       <description>Roll moment due to aileron</description>
       <product>
          <property>aero/qbar-psf</property>
          <property>metrics/Sw-sqft</property>
          <property>metrics/bw-ft</property>
          <property>fcs/left-aileron-pos-rad</property>
          <value>0.1</value>
       </product>
    </function>

    <function name="aero/moment/Roll_rudder">
       <description>Roll moment due to rudder</description>
       <product>
           <property>aero/qbar-psf</property>
           <property>metrics/Sw-sqft</property>
           <property>metrics/bw-ft</property>
           <property>fcs/rudder-pos-rad</property>
           <value>0.01</value>
       </product>
    </function>

  </axis>

  <axis name="PITCH">

    <function name="aero/moment/Pitch_alpha">
       <description>Pitch moment due to alpha</description>
       <product>
           <property>aero/qbar-psf</property>
           <property>metrics/Sw-sqft</property>
           <property>metrics/cbarw-ft</property>
           <property>aero/alpha-rad</property>
           <value>-0.6</value>
       </product>
    </function>

    <function name="aero/moment/Pitch_elevator">
       <description>Pitch moment due to elevator</description>
       <product>
          <property>aero/qbar-psf</property>
          <property>metrics/Sw-sqft</property>
          <property>metrics/cbarw-ft</property>
          <property>fcs/elevator-pos-rad</property>
          <table>
            <independentVar lookup="row">velocities/mach</independentVar>
            <tableData>
              0.0     -1.200
              2.0     -0.300
            </tableData>
          </table>
       </product>
    </function>

    <function name="aero/moment/Pitch_damp">
       <description>Pitch moment due to pitch rate</description>
       <product>
           <property>aero/qbar-psf</property>
           <property>metrics/Sw-sqft</property>
           <property>metrics/cbarw-ft</property>
           <property>aero/ci2vel</property>
           <property>velocities/q-aero-rad_sec</property>
           <value>-17</value>
       </product>
    </function>

    <function name="aero/moment/Pitch_alphadot">
       <description>Pitch moment due to alpha rate</description>
       <product>
           <property>aero/qbar-psf</property>
           <property>metrics/Sw-sqft</property>
           <property>metrics/cbarw-ft</property>
           <property>aero/ci2vel</property>
           <property>aero/alphadot-rad_sec</property>
           <value>-6</value>
       </product>
    </function>

  </axis>

  <axis name="YAW">

    <function name="aero/moment/Yaw_beta">
       <description>Yaw moment due to beta</description>
       <product>
           <property>aero/qbar-psf</property>
           <property>metrics/Sw-sqft</property>
           <property>metrics/bw-ft</property>
           <property>aero/beta-rad</property>
           <value>0.12</value>
       </product>
    </function>

    <function name="aero/moment/Yaw_damp">
       <description>Yaw moment due to yaw rate</description>
       <product>
           <property>aero/qbar-psf</property>
           <property>metrics/Sw-sqft</property>
           <property>metrics/bw-ft</property>
           <property>aero/bi2vel</property>
           <property>velocities/r-aero-rad_sec</property>
           <value>-0.15</value>
       </product>
    </function>

    <function name="aero/moment/Yaw_rudder">
       <description>Yaw moment due to rudder</description>
       <product>
           <property>aero/qbar-psf</property>
           <property>metrics/Sw-sqft</property>
           <property>metrics/bw-ft</property>
           <property>fcs/rudder-pos-rad</property>
           <value>-0.1</value>
       </product>
    </function>

    <function name="aero/moment/Yaw_aileron">
       <description>Adverse yaw</description>
       <product>
           <property>aero/qbar-psf</property>
           <property>metrics/Sw-sqft</property>
           <property>metrics/bw-ft</property>
           <property>fcs/left-aileron-pos-rad</property>
           <value>0</value>
       </product>
    </function>

  </axis>

 </aerodynamics>

 <external_reactions>
 </external_reactions>

</fdm_config>
